// Main WECC 240 bus model
//
// Most specifications in this file should be provided by the config.glm file
// unless they are considered invariant across the scenarios being considered.
//

#include "config.glm"

//#version "${VERSION}"

//#option verbose
//#option debug
//#set output_message_context=NONE

clock {
    timezone "${TIMEZONE}";
    starttime "${STARTTIME}";
    stoptime "${STOPTIME}";
}

module pypower
{
    maximum_iterations ${MAXIMUM_ITERATIONS};
    maximum_timestep ${MAXIMUM_TIMESTEP};
    stop_on_failure ${STOP_ON_FAILURE};
    controllers "wecc240_controllers";
    enable_opf TRUE;
    maximum_iterations_opf 20;
    opf_feasibility_tolerance 1.3;
    opf_gradient_tolerance 3.0;
    opf_condition_tolerance 1000;
    opf_cost_tolerance 0.01;
}

//
// Load the PSS/E model
//
#input "wecc240_psse.raw" --exclude psse_owner,psse_area,psse_zone
// TODO: exclude gen once the model solves ok with all loads and powerplants included below
//#input "wecc240_psse.raw" --exclude gen,psse_owner,psse_area,psse_zone

//
// Load the GIS data
//
#include "../data/wecc240_gis.glm"

//
// Network mods
//

object dcline
{
    from "wecc240_psse_N_4007";
    to "wecc240_psse_N_2405";
    Sfrom 0 MVA; // TODO: currently added as load to 4007 in PSS/E
    Sto 0 MVA; // TODO: currently added as negative load to 2405 in PSS/E
    Pmax 3100 MW;
    Qminf -300 MVAr;
    Qmaxf 300 MVAr;
    Qmint -300 MVAr;
    Qmaxt 300 MVAr;
}

//
// Load powerplant data
//

//#system python3 powerplants_aggregated.py
//#include "powerplants_aggregated.glm"

//
// Load loads data
//
//#include "../data/loads.glm"

//
// Save the final result to JSON
//

//
// Setup georecorders
//
//module recorders;

#set savefile="wecc240.json"
